units real
atom_style full

dimension 3
boundary p p p

bond_style hybrid harmonic
angle_style hybrid harmonic
dihedral_style hybrid multi/harmonic
special_bonds lj 0.0 0.0 0.5 coul 0.0 0.0 0.8333

read_data ../../ethanol.lmp

pair_style hybrid/overlay lj/cut 10.0 lj/cut/soft 2.0 0.5 10.0 coul/long 10.0 coul/cut/soft 1.0 0.0 10.0
pair_modify tail yes shift no

kspace_style pppm 1e-4

# Interactions of ethanol with ethanol

pair_coeff 1 1 lj/cut/soft 0.109400 3.399670 1.0
pair_coeff 1 2 lj/cut/soft 0.109400 3.399670 1.0
pair_coeff 1 3 lj/cut/soft 0.151720 3.233070 1.0
pair_coeff 1 4 lj/cut/soft 0.041440 3.024600 1.0
pair_coeff 1 5 lj/cut/soft 0.041440 2.935510 1.0
pair_coeff 1 6 lj/cut/soft 0.000000 2.199840 1.0
pair_coeff 2 2 lj/cut/soft 0.109400 3.399670 1.0
pair_coeff 2 3 lj/cut/soft 0.151720 3.233070 1.0
pair_coeff 2 4 lj/cut/soft 0.041440 3.024600 1.0
pair_coeff 2 5 lj/cut/soft 0.041440 2.935510 1.0
pair_coeff 2 6 lj/cut/soft 0.000000 2.199840 1.0
pair_coeff 3 3 lj/cut/soft 0.210400 3.066470 1.0
pair_coeff 3 4 lj/cut/soft 0.057470 2.858000 1.0
pair_coeff 3 5 lj/cut/soft 0.057470 2.768910 1.0
pair_coeff 3 6 lj/cut/soft 0.000000 2.033230 1.0
pair_coeff 4 4 lj/cut/soft 0.015700 2.649530 1.0
pair_coeff 4 5 lj/cut/soft 0.015700 2.560440 1.0
pair_coeff 4 6 lj/cut/soft 0.000000 1.824760 1.0
pair_coeff 5 5 lj/cut/soft 0.015700 2.471350 1.0
pair_coeff 5 6 lj/cut/soft 0.000000 1.735680 1.0
pair_coeff 6 6 lj/cut/soft 0.000000 1.000000 1.0

# Interactions of TIP3P water with TIP3P water

pair_coeff 7 7 lj/cut 0.152100 3.150700
pair_coeff 7 8 lj/cut 0.000000 2.075350
pair_coeff 8 8 lj/cut 0.000000 1.000000

# Cross interactions of ethanol and TIP3P water

pair_coeff 1 7 lj/cut/soft 0.129000 3.275190 1.0
pair_coeff 1 8 lj/cut/soft 0.000000 2.199840 1.0
pair_coeff 2 7 lj/cut/soft 0.129000 3.275190 1.0
pair_coeff 2 8 lj/cut/soft 0.000000 2.199840 1.0
pair_coeff 3 7 lj/cut/soft 0.178890 3.108580 1.0
pair_coeff 3 8 lj/cut/soft 0.000000 2.033230 1.0
pair_coeff 4 7 lj/cut/soft 0.048870 2.900110 1.0
pair_coeff 4 8 lj/cut/soft 0.000000 1.824760 1.0
pair_coeff 5 7 lj/cut/soft 0.048870 2.811020 1.0
pair_coeff 5 8 lj/cut/soft 0.000000 1.735680 1.0
pair_coeff 6 7 lj/cut/soft 0.000000 2.075350 1.0
pair_coeff 6 8 lj/cut/soft 0.000000 1.000000 1.0

pair_coeff  * * coul/long

# Prevent intramolecular charge interaction to be scaled

pair_coeff  1*6 1*6  coul/cut/soft 9.999999999999997e+17

# Constrain all bonds with hydrogens and water completly (bonds and angle)

fix settle all shake 0.0001 20 0 b 2 3 4 6 7 8 9 t 7 8 a 14

variable qi equal 1e-9

set type 1 charge $(-0.0968*v_qi)
set type 2 charge $(0.1297*v_qi)
set type 3 charge $(-0.5994*v_qi)
set type 4 charge $(0.0448*v_qi)
set type 5 charge $(0.0171*v_qi)
set type 6 charge $(0.3979*v_qi)

# ============= RUN NPT SIMULATION =============

timestep        1

# ============= GENERATE VELOCITIES =============

velocity        all create 298.15 12345 rot yes dist gaussian

# ============= SET INTEGRATION SETTINGS =============

fix             int_npt all npt temp 298.15 298.15 100.0 iso 1 1 1000.0

thermo          10000

run             5000000

reset_timestep  0

# ============= SET TI SETTINGS =============

variable lambda equal 0.0016
variable dlambda equal 0.0001
variable dl_coul equal "-1/v_lambda^2 * ( 2*v_lambda*v_dlambda + v_dlambda^2) / ( 2*v_lambda*v_dlambda+v_dlambda^2+v_lambda^2 )"

variable dqC1  equal -0.0968*v_dlambda
variable dqC2  equal  0.1297*v_dlambda
variable dqO   equal -0.599401*v_dlambda
variable dqHC1 equal  0.0448*v_dlambda
variable dqHC2 equal  0.0171*v_dlambda
variable dqHO  equal  0.3979*v_dlambda

compute FEP all fep 298.15 &
  pair coul/cut/soft lambda 1*6 1*6 v_dl_coul &
  atom charge 1 v_dqC1  &
  atom charge 2 v_dqC2  &
  atom charge 3 v_dqO   &
  atom charge 4 v_dqHC1 &
  atom charge 5 v_dqHC2 &
  atom charge 6 v_dqHO  &
  volume yes

# ============= SET SAMPLING SETTINGS =============

thermo_style custom step etotal ke pe evdwl ecoul elong temp press vol v_lambda v_dl_coul
thermo       100000

fix FEP all ave/time 10 100 1000 c_FEP[*] file fep_coul.fepxy

# ============= RUN =============

run 3000000
write_restart   equil.restart
