units real
atom_style full

dimension 3
boundary p p p

bond_style hybrid harmonic
angle_style hybrid harmonic
dihedral_style hybrid multi/harmonic
special_bonds lj 0.0 0.0 0.5 coul 0.0 0.0 0.8333

read_data ../../../ethanol.lmp

pair_style hybrid/overlay lj/cut 10.0 lj/cut/soft 1.0 0.5 10.0 coul/long 10.0 coul/cut/soft 1.0 0.0 10.0
pair_modify tail yes shift no

kspace_style pppm 1e-4

# Interactions of ethanol with ethanol

pair_coeff 1 1 lj/cut/soft 0.109400 3.399670 1.0
pair_coeff 1 2 lj/cut/soft 0.109400 3.399670 1.0
pair_coeff 1 3 lj/cut/soft 0.151720 3.233070 1.0
pair_coeff 1 4 lj/cut/soft 0.041440 3.024600 1.0
pair_coeff 1 5 lj/cut/soft 0.041440 2.935510 1.0
pair_coeff 1 6 lj/cut/soft 0.000000 2.199840 1.0
pair_coeff 2 2 lj/cut/soft 0.109400 3.399670 1.0
pair_coeff 2 3 lj/cut/soft 0.151720 3.233070 1.0
pair_coeff 2 4 lj/cut/soft 0.041440 3.024600 1.0
pair_coeff 2 5 lj/cut/soft 0.041440 2.935510 1.0
pair_coeff 2 6 lj/cut/soft 0.000000 2.199840 1.0
pair_coeff 3 3 lj/cut/soft 0.210400 3.066470 1.0
pair_coeff 3 4 lj/cut/soft 0.057470 2.858000 1.0
pair_coeff 3 5 lj/cut/soft 0.057470 2.768910 1.0
pair_coeff 3 6 lj/cut/soft 0.000000 2.033230 1.0
pair_coeff 4 4 lj/cut/soft 0.015700 2.649530 1.0
pair_coeff 4 5 lj/cut/soft 0.015700 2.560440 1.0
pair_coeff 4 6 lj/cut/soft 0.000000 1.824760 1.0
pair_coeff 5 5 lj/cut/soft 0.015700 2.471350 1.0
pair_coeff 5 6 lj/cut/soft 0.000000 1.735680 1.0
pair_coeff 6 6 lj/cut/soft 0.000000 1.000000 1.0

# Interactions of TIP3P water with TIP3P water

pair_coeff 7 7 lj/cut 0.152100 3.150700
pair_coeff 7 8 lj/cut 0.000000 2.075350
pair_coeff 8 8 lj/cut 0.000000 1.000000

# Cross interactions of ethanol and TIP3P water

pair_coeff 1 7 lj/cut/soft 0.129000 3.275190 0.125
pair_coeff 1 8 lj/cut/soft 0.000000 2.199840 0.125
pair_coeff 2 7 lj/cut/soft 0.129000 3.275190 0.125
pair_coeff 2 8 lj/cut/soft 0.000000 2.199840 0.125
pair_coeff 3 7 lj/cut/soft 0.178890 3.108580 0.125
pair_coeff 3 8 lj/cut/soft 0.000000 2.033230 0.125
pair_coeff 4 7 lj/cut/soft 0.048870 2.900110 0.125
pair_coeff 4 8 lj/cut/soft 0.000000 1.824760 0.125
pair_coeff 5 7 lj/cut/soft 0.048870 2.811020 0.125
pair_coeff 5 8 lj/cut/soft 0.000000 1.735680 0.125
pair_coeff 6 7 lj/cut/soft 0.000000 2.075350 0.125
pair_coeff 6 8 lj/cut/soft 0.000000 1.000000 0.125

pair_coeff  * * coul/long

# Prevent intramolecular charge interaction to be scaled

pair_coeff  1*6 1*6  coul/cut/soft 9.999999999999997e+17

# Constrain all bonds with hydrogens and water completly (bonds and angle)

fix settle all shake 0.0001 20 0 b 2 3 4 6 7 8 9 t 7 8 a 14

variable qi equal 1e-09

set type 1 charge $(-0.0968*v_qi)
set type 2 charge $(0.1297*v_qi)
set type 3 charge $(-0.5994*v_qi)
set type 4 charge $(0.0448*v_qi)
set type 5 charge $(0.0171*v_qi)
set type 6 charge $(0.3979*v_qi)

# ============= RUN NPT SIMULATION =============

timestep        1

# ============= GENERATE VELOCITIES =============

velocity        all create 298.15 12345 rot yes dist gaussian

# ============= SET INTEGRATION SETTINGS =============

fix             int_npt all npt temp 298.15 298.15 100.0 iso 1 1 1000.0

thermo          10000

run             1000000

write_restart   equil.restart

reset_timestep  0

# ============= SET TI SETTINGS =============

variable lambda equal 0.125
variable dlambda equal 0.0001

compute FEP all fep 298.15 &
  pair lj/cut/soft lambda 1*6 7*8 v_dlambda &
  tail yes &
  volume yes

# ============= SET SAMPLING SETTINGS =============

thermo_style custom step etotal ke pe evdwl ecoul elong temp press vol v_lambda
thermo       100000

fix FEP all ave/time 10 100 1000 c_FEP[*] file fep_lj.fep

# ============= RUN =============

run 500000
